*Heading
** Job name: triangle Model name: Inco_medium_1_2500_440
** Generated by: Abaqus/CAE 2023
*Preprint, echo=NO, model=NO, history=NO, contact=NO
**
** PARTS
**
*Part, name=Disk
*Node
      1, 0.00789999962,           0.
      2, 0.00789999962, 0.00100000005
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*Element, type=CPS3
 1,   1, 103, 274
 2, 274, 116,   1
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*Nset, nset=Left
   3,   4, 110
*Elset, elset=Left
 26, 28
*Nset, nset=Right
  99, 100, 262
*Elset, elset=Right
 422, 424
*Nset, nset=Bottom
   1,   4,   5,   7,   9,  11
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*Elset, elset=Bottom
   2,   6,  10,  14,  18,  22
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*Nset, nset=All, generate
   1,  333,    1
*Elset, elset=All, generate
   1,  440,    1
** Section: Sec_Inco
*Solid Section, elset=All, material=Inco
,
*End Part
**
**
** ASSEMBLY
**
*Assembly, name=Assembly
**
*Instance, name=Disk-1, part=Disk
*End Instance
**
*End Assembly
*Amplitude, name=Temp_Cycling
             0.,              0.,            100.,              0.,            101.,            440.,            281.,            440.
           284.,              0.,           1884.,              0.,           1885.,            440.,           2065.,            440.
          2068.,              0.,           3668.,              0.,           3669.,            440.,           3849.,            440.
          3852.,              0.,           5452.,              0.,           5453.,            440.,           5633.,            440.
          5636.,              0.,           7236.,              0.,           7237.,            440.,           7417.,            440.
          7420.,              0.,           9020.,              0.,           9021.,            440.,           9201.,            440.
          9204.,              0.,          10804.,              0.,          10805.,            440.,          10985.,            440.
         10988.,              0.,          12588.,              0.,          12589.,            440.,          12769.,            440.
         12772.,              0.,          14372.,              0.,          14373.,            440.,          14553.,            440.
         14556.,              0.,          16156.,              0.,          16157.,            440.,          16337.,            440.
         16340.,              0.,          17940.,              0.
*Amplitude, name=rotation_ramp
             0.,              0.,            100.,              1.
**
** MATERIALS
**
*Material, name=Inco
*Conductivity
 21.9771,
*Density
 8110.33,
*Elastic
 2.03947e+11, 0.3
*Expansion
 1.42e-05,
*Plastic
 8.85669e+08,0.
*Specific Heat
 511.261,
*Time Points, name=OutputTimePoints
100., 281., 1884., 2065., 3668., 3849., 5452., 5633.
7236., 7417., 9020., 9201., 10804., 10985., 12588., 12769.
14372., 14553., 16156., 16337., 17940.
**
** BOUNDARY CONDITIONS
**
** Name: Left_radial Type: Displacement/Rotation
*Boundary
Disk-1.Left, 1, 1
Disk-1.Left, 6, 6
** Name: Y_symm Type: Symmetry/Antisymmetry/Encastre
*Boundary
Disk-1.Bottom, YSYMM
**
** PREDEFINED FIELDS
**
** Name: InitialTempField   Type: Temperature
*Initial Conditions, type=TEMPERATURE
Disk-1.All, 0.
** ----------------------------------------------------------------
**
** STEP: StepAll
**
*Step, name=StepAll, nlgeom=YES, inc=10000000
*Coupled Temperature-displacement, creep=none
1., 17940.,
**
** BOUNDARY CONDITIONS
**
** Name: Temp_Left Type: Temperature
*Boundary
Disk-1.Left, 11, 11
** Name: Temp_Right Type: Temperature
*Boundary, amplitude=Temp_Cycling
Disk-1.Right, 11, 11, 1.
**
** LOADS
**
** Name: Centrifugal   Type: Rotational body force
*Dload, amplitude=rotation_ramp
Disk-1.All, CENTRIF, 6.25e+06,0.,0.,0.,0.0,1.0,0.0
**
** OUTPUT REQUESTS
**
*Restart, write, frequency=0
**
** FIELD OUTPUT: F-Output-1
**
*Output, field
*Node Output
NT, U
*Element Output, directions=YES
MISES, PEEQ
*Output, history, frequency=0
*End Step
